*Heading
** Radial Needle Microstructure for Abaqus
** Generated with enhanced export script
**
** ----------------------------------------------------------------
**                          NODES
** ----------------------------------------------------------------
*Node
1, 0.000000, 0.000000, 0.000000
2, 0.500000, 0.000000, 0.000000
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**
** ----------------------------------------------------------------
**                          ELEMENTS
** ----------------------------------------------------------------
*Element, type=C3D8
1, 1, 2, 23, 22, 442, 443, 464, 463
2, 2, 3, 24, 23, 443, 444, 465, 464
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**
** ----------------------------------------------------------------
**                     GRAIN ELEMENT SETS
** ----------------------------------------------------------------
*Elset, elset=Grain1
11, 12, 13, 14, 15, 16
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*Elset, elset=Grain2
1, 2, 3, 4, 5, 6
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*Elset, elset=Grain3
1501, 1881, 1882, 1901, 1902, 1921
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*Elset, elset=Grain4
2412, 2809, 2810, 2811, 2812, 2813
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**
** ----------------------------------------------------------------
**                     NEEDLE ELEMENT SETS
** ----------------------------------------------------------------
*Elset, elset=Needle1
2121, 2481, 2501, 2521
*Elset, elset=Needle2
2163, 2502, 2522, 2541, 2542, 2543
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*Elset, elset=Needle3
2143, 2462, 2523, 2801, 2802, 2821
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*Elset, elset=Needle5
1768, 1787, 1788, 1789, 1790, 1791
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*Elset, elset=Needle6
806, 1206, 1207, 1208, 1209, 1210
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*Elset, elset=Needle7
41, 42, 43, 61, 62, 63
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*Elset, elset=Needle8
19, 20, 418, 419, 420, 438
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*Elset, elset=Needle9
4143, 4962, 4963, 4964, 4984, 5362
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*Elset, elset=Needle11
11, 12, 13, 14, 15, 16
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*Elset, elset=Needle13
101, 102, 103, 104, 121, 122
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*Elset, elset=Needle15
184, 203, 204, 205, 223, 224, 225, 226, 244, 245, 603, 604, 605, 624, 625, 645
*Elset, elset=Needle16
164
*Elset, elset=Needle17
1726, 1747, 1766, 1767, 2105, 2125
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*Elset, elset=Needle18
185, 186, 206, 564, 585, 586, 587, 606, 607, 626, 987
*Elset, elset=Needle19
861, 882, 903, 1261, 1281, 1282
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*Elset, elset=Needle20
985
*Elset, elset=Needle21
221, 222, 241, 242, 243, 261
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*Elset, elset=Needle22
85, 105, 106, 124, 125, 126
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*Elset, elset=Needle23
209, 210, 211, 212, 230, 231
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*Elset, elset=Needle24
2185, 2186, 2187, 2205, 2566, 2585
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*Elset, elset=Needle25
227, 228, 229, 246, 247, 248
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*Elset, elset=Needle26
1, 2, 3, 4, 21, 22
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*Elset, elset=Needle28
395, 754, 755, 756, 773, 774
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*Elset, elset=Needle29
3710, 4069, 4088, 4089, 4090, 4091
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*Elset, elset=Needle30
1503, 1521, 1545, 1581, 1582, 1583
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*Elset, elset=Needle31
2920, 3312, 3319, 3320, 3336, 3356
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*Elset, elset=Needle32
2222, 2581, 2582, 2583, 2601, 2602
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*Elset, elset=Needle33
3051, 3091, 3110, 3149, 3150, 3168
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*Elset, elset=Needle34
3711, 3731, 3751, 4111, 4112, 4130
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*Elset, elset=Needle35
4531, 4532, 4551, 4910, 4911, 4930
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*Elset, elset=Needle36
1199, 1537, 1538, 1539, 1540, 1557
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*Elset, elset=Needle37
1859, 1860, 1879, 2220, 2239, 2240
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*Elset, elset=Needle38
3378, 3400, 3737, 3738, 3739, 3740
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*Elset, elset=Needle39
5, 6, 7, 8, 9, 10
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*Elset, elset=Needle40
3491, 3850, 3851, 3869, 3870, 3871
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*Elset, elset=Needle41
3392, 3396, 3412, 3413, 3414, 3415
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*Elset, elset=Needle42
80, 99, 100, 117, 119, 120
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*Elset, elset=Needle43
2437, 2456, 2815, 2816, 2817, 2819
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*Elset, elset=Needle44
3753, 4133, 4152, 4153, 4154, 4513
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*Elset, elset=Needle45
118, 136, 137, 138, 139, 156
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*Elset, elset=Needle46
3007, 3009, 3026, 3044, 3045, 3386
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*Elset, elset=Needle47
3372, 3752, 3771, 3772, 3773, 3792
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*Elset, elset=Needle49
4877, 5220, 5240, 5258, 5259, 5277
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*Elset, elset=Needle53
1501, 1881, 1882, 1901, 1902, 1921
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*Elset, elset=Needle54
4760, 5119, 5120, 5138, 5139, 5140
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*Elset, elset=Needle56
6435, 6455, 6494, 6514, 6813, 6814
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*Elset, elset=Needle58
2381, 2741, 2742, 2761, 2762, 2763
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*Elset, elset=Needle59
6378, 6399, 6400, 6736, 6757, 6758
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*Elset, elset=Needle60
7451, 7831, 7850, 7851, 7852, 7871
*Elset, elset=Needle61
6439, 6458
*Elset, elset=Needle62
2412, 2809, 2810, 2811, 2812, 2813
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*Elset, elset=Needle63
6436, 6815, 6816, 6836, 6837, 6857, 7216, 7217, 7236, 7237, 7238, 7617
*Elset, elset=Needle64
6017, 6416, 6437
*Elset, elset=Needle65
6417, 6418, 6419, 6817, 6818, 6819, 6838, 7218
*Elset, elset=Needle66
2818, 3216, 3217, 3218, 3219, 3220
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**
** ----------------------------------------------------------------
**                   BOUNDARY NODE SETS
** ----------------------------------------------------------------
** z = 0 (bottom face)
*Nset, nset=Bottom_Z
1, 22, 43, 64, 85, 106
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** z = 10 (top face)
*Nset, nset=Top_Z
8821, 8842, 8863, 8884, 8905, 8926
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** x = 0 (left face)
*Nset, nset=Bottom_X
1, 442, 883, 1324, 1765, 2206
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** x = 10 (right face)
*Nset, nset=Top_X
21, 462, 903, 1344, 1785, 2226
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** y = 0 (front face)
*Nset, nset=Bottom_Y
1, 442, 883, 1324, 1765, 2206
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** y = 10 (back face)
*Nset, nset=Top_Y
421, 862, 1303, 1744, 2185, 2626
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**
** ----------------------------------------------------------------
**                          MATERIALS
** ----------------------------------------------------------------
*Material, name=Aragonite
*Elastic, type=ENGINEERING CONSTANTS
140432.0, 70297.0, 63413.0, 0.5048, 0.0775, 0.4664, 46600.0, 31100.0
 42100.0
**
** ----------------------------------------------------------------
**                    SECTION ASSIGNMENTS
** ----------------------------------------------------------------
*Solid Section, elset=Needle1, material=Aragonite, orientation=Orient1
,
*Orientation, name=Orient1
-0.692691, -0.699878, 0.174212, -0.710747, 0.703448, 0.000000
1, 0
*Solid Section, elset=Needle2, material=Aragonite, orientation=Orient2
,
*Orientation, name=Orient2
-0.143548, -0.495776, 0.856505, -0.960547, 0.278119, 0.000000
1, 0
*Solid Section, elset=Needle3, material=Aragonite, orientation=Orient3
,
*Orientation, name=Orient3
-0.437490, -0.675570, 0.593472, -0.839368, 0.543564, 0.000000
1, 0
*Solid Section, elset=Needle5, material=Aragonite, orientation=Orient5
,
*Orientation, name=Orient5
0.763105, 0.036851, 0.645223, 0.048235, -0.998836, 0.000000
1, 0
*Solid Section, elset=Needle6, material=Aragonite, orientation=Orient6
,
*Orientation, name=Orient6
0.209078, -0.977899, 0.000969, -0.977899, -0.209078, 0.000000
1, 0
*Solid Section, elset=Needle7, material=Aragonite, orientation=Orient7
,
*Orientation, name=Orient7
-0.785781, -0.581887, -0.209655, -0.595113, 0.803642, 0.000000
1, 0
*Solid Section, elset=Needle8, material=Aragonite, orientation=Orient8
,
*Orientation, name=Orient8
0.735639, -0.672594, 0.080327, -0.674775, -0.738024, 0.000000
1, 0
*Solid Section, elset=Needle9, material=Aragonite, orientation=Orient9
,
*Orientation, name=Orient9
-0.366659, 0.185437, 0.911688, 0.451312, 0.892366, -0.000000
1, 0
*Solid Section, elset=Needle11, material=Aragonite, orientation=Orient11
,
*Orientation, name=Orient11
0.685328, -0.645320, -0.337471, -0.685537, -0.728038, 0.000000
1, 0
*Solid Section, elset=Needle13, material=Aragonite, orientation=Orient13
,
*Orientation, name=Orient13
-0.863371, -0.426487, -0.269630, -0.442890, 0.896576, 0.000000
1, 0
*Solid Section, elset=Needle15, material=Aragonite, orientation=Orient15
,
*Orientation, name=Orient15
-0.470500, 0.281040, -0.836449, 0.512804, 0.858506, -0.000000
1, 0
*Solid Section, elset=Needle16, material=Aragonite, orientation=Orient16
,
*Orientation, name=Orient16
-0.102202, -0.290608, -0.951369, -0.943362, 0.331765, 0.000000
1, 0
*Solid Section, elset=Needle17, material=Aragonite, orientation=Orient17
,
*Orientation, name=Orient17
0.020493, -0.681780, 0.731270, -0.999549, -0.030045, 0.000000
1, 0
*Solid Section, elset=Needle18, material=Aragonite, orientation=Orient18
,
*Orientation, name=Orient18
0.191423, -0.492990, -0.848715, -0.932193, -0.361961, 0.000000
1, 0
*Solid Section, elset=Needle19, material=Aragonite, orientation=Orient19
,
*Orientation, name=Orient19
-0.616450, -0.778229, 0.119783, -0.783873, 0.620921, 0.000000
1, 0
*Solid Section, elset=Needle20, material=Aragonite, orientation=Orient20
,
*Orientation, name=Orient20
-0.926227, 0.376147, 0.024854, 0.376263, 0.926513, -0.000000
1, 0
*Solid Section, elset=Needle21, material=Aragonite, orientation=Orient21
,
*Orientation, name=Orient21
-0.754033, 0.626124, 0.198499, 0.638837, 0.769342, -0.000000
1, 0
*Solid Section, elset=Needle22, material=Aragonite, orientation=Orient22
,
*Orientation, name=Orient22
0.167741, -0.725339, -0.667642, -0.974287, -0.225312, 0.000000
1, 0
*Solid Section, elset=Needle23, material=Aragonite, orientation=Orient23
,
*Orientation, name=Orient23
0.753424, 0.657078, 0.024500, 0.657275, -0.753650, 0.000000
1, 0
*Solid Section, elset=Needle24, material=Aragonite, orientation=Orient24
,
*Orientation, name=Orient24
0.132667, 0.373805, 0.917970, 0.942407, -0.334469, 0.000000
1, 0
*Solid Section, elset=Needle25, material=Aragonite, orientation=Orient25
,
*Orientation, name=Orient25
0.439262, 0.886804, -0.143623, 0.896094, -0.443864, 0.000000
1, 0
*Solid Section, elset=Needle26, material=Aragonite, orientation=Orient26
,
*Orientation, name=Orient26
-0.717877, -0.516804, -0.466439, -0.584255, 0.811570, 0.000000
1, 0
*Solid Section, elset=Needle28, material=Aragonite, orientation=Orient28
,
*Orientation, name=Orient28
0.205913, 0.876190, -0.435765, 0.973479, -0.228777, 0.000000
1, 0
*Solid Section, elset=Needle29, material=Aragonite, orientation=Orient29
,
*Orientation, name=Orient29
-0.391667, -0.622576, 0.677493, -0.846432, 0.532497, 0.000000
1, 0
*Solid Section, elset=Needle30, material=Aragonite, orientation=Orient30
,
*Orientation, name=Orient30
-0.821878, 0.561416, -0.096588, 0.564053, 0.825739, -0.000000
1, 0
*Solid Section, elset=Needle31, material=Aragonite, orientation=Orient31
,
*Orientation, name=Orient31
0.580348, -0.639169, 0.504639, -0.740352, -0.672220, 0.000000
1, 0
*Solid Section, elset=Needle32, material=Aragonite, orientation=Orient32
,
*Orientation, name=Orient32
-0.966267, 0.257344, 0.010074, 0.257357, 0.966316, -0.000000
1, 0
*Solid Section, elset=Needle33, material=Aragonite, orientation=Orient33
,
*Orientation, name=Orient33
-0.281952, 0.930805, 0.232604, 0.957056, 0.289904, -0.000000
1, 0
*Solid Section, elset=Needle34, material=Aragonite, orientation=Orient34
,
*Orientation, name=Orient34
0.057822, -0.899569, 0.432934, -0.997941, -0.064145, 0.000000
1, 0
*Solid Section, elset=Needle35, material=Aragonite, orientation=Orient35
,
*Orientation, name=Orient35
-0.314918, -0.420371, 0.850949, -0.800329, 0.599561, 0.000000
1, 0
*Solid Section, elset=Needle36, material=Aragonite, orientation=Orient36
,
*Orientation, name=Orient36
0.532975, 0.840282, -0.099320, 0.844457, -0.535623, 0.000000
1, 0
*Solid Section, elset=Needle37, material=Aragonite, orientation=Orient37
,
*Orientation, name=Orient37
0.883321, 0.461234, -0.083713, 0.462859, -0.886432, 0.000000
1, 0
*Solid Section, elset=Needle38, material=Aragonite, orientation=Orient38
,
*Orientation, name=Orient38
0.942654, 0.086258, 0.322432, 0.091125, -0.995840, 0.000000
1, 0
*Solid Section, elset=Needle39, material=Aragonite, orientation=Orient39
,
*Orientation, name=Orient39
-0.408527, -0.523803, -0.747487, -0.788531, 0.614995, 0.000000
1, 0
*Solid Section, elset=Needle40, material=Aragonite, orientation=Orient40
,
*Orientation, name=Orient40
-0.139782, 0.858939, 0.492630, 0.987015, 0.160625, -0.000000
1, 0
*Solid Section, elset=Needle41, material=Aragonite, orientation=Orient41
,
*Orientation, name=Orient41
0.507714, 0.682135, 0.526230, 0.802189, -0.597071, 0.000000
1, 0
*Solid Section, elset=Needle42, material=Aragonite, orientation=Orient42
,
*Orientation, name=Orient42
0.605480, 0.041634, -0.794770, 0.068601, -0.997644, 0.000000
1, 0
*Solid Section, elset=Needle43, material=Aragonite, orientation=Orient43
,
*Orientation, name=Orient43
0.518444, -0.854618, -0.029058, -0.854979, -0.518663, 0.000000
1, 0
*Solid Section, elset=Needle44, material=Aragonite, orientation=Orient44
,
*Orientation, name=Orient44
0.190342, -0.580237, 0.791893, -0.950181, -0.311700, 0.000000
1, 0
*Solid Section, elset=Needle45, material=Aragonite, orientation=Orient45
,
*Orientation, name=Orient45
0.537814, -0.052733, -0.841413, -0.097583, -0.995227, 0.000000
1, 0
*Solid Section, elset=Needle46, material=Aragonite, orientation=Orient46
,
*Orientation, name=Orient46
-0.900686, 0.430960, 0.055122, 0.431616, 0.902058, -0.000000
1, 0
*Solid Section, elset=Needle47, material=Aragonite, orientation=Orient47
,
*Orientation, name=Orient47
0.467978, 0.444442, 0.763851, 0.688638, -0.725105, 0.000000
1, 0
*Solid Section, elset=Needle49, material=Aragonite, orientation=Orient49
,
*Orientation, name=Orient49
0.460647, -0.783374, -0.417289, -0.862012, -0.506888, 0.000000
1, 0
*Solid Section, elset=Needle53, material=Aragonite, orientation=Orient53
,
*Orientation, name=Orient53
-0.594412, 0.129776, -0.793620, 0.213303, 0.976986, -0.000000
1, 0
*Solid Section, elset=Needle54, material=Aragonite, orientation=Orient54
,
*Orientation, name=Orient54
0.791734, 0.473790, -0.385590, 0.513499, -0.858090, 0.000000
1, 0
*Solid Section, elset=Needle56, material=Aragonite, orientation=Orient56
,
*Orientation, name=Orient56
0.327882, -0.943304, -0.051686, -0.944566, -0.328321, 0.000000
1, 0
*Solid Section, elset=Needle58, material=Aragonite, orientation=Orient58
,
*Orientation, name=Orient58
-0.647699, 0.409878, -0.642250, 0.534744, 0.845014, -0.000000
1, 0
*Solid Section, elset=Needle59, material=Aragonite, orientation=Orient59
,
*Orientation, name=Orient59
0.753717, 0.620926, -0.215318, 0.635840, -0.771821, 0.000000
1, 0
*Solid Section, elset=Needle60, material=Aragonite, orientation=Orient60
,
*Orientation, name=Orient60
0.648006, 0.538454, 0.538660, 0.639097, -0.769126, 0.000000
1, 0
*Solid Section, elset=Needle61, material=Aragonite, orientation=Orient61
,
*Orientation, name=Orient61
-0.391323, -0.834630, 0.387632, -0.905421, 0.424514, 0.000000
1, 0
*Solid Section, elset=Needle62, material=Aragonite, orientation=Orient62
,
*Orientation, name=Orient62
-0.722537, -0.227651, -0.652775, -0.300508, 0.953779, 0.000000
1, 0
*Solid Section, elset=Needle63, material=Aragonite, orientation=Orient63
,
*Orientation, name=Orient63
-0.253553, -0.459757, 0.851078, -0.875663, 0.482923, 0.000000
1, 0
*Solid Section, elset=Needle64, material=Aragonite, orientation=Orient64
,
*Orientation, name=Orient64
-0.286500, -0.926623, 0.243490, -0.955377, 0.295390, 0.000000
1, 0
*Solid Section, elset=Needle65, material=Aragonite, orientation=Orient65
,
*Orientation, name=Orient65
-0.066248, -0.718514, 0.692351, -0.995776, 0.091812, 0.000000
1, 0
*Solid Section, elset=Needle66, material=Aragonite, orientation=Orient66
,
*Orientation, name=Orient66
-0.071853, -0.351341, -0.933486, -0.979722, 0.200363, 0.000000
1, 0
**
** ----------------------------------------------------------------
**                            STEP
** ----------------------------------------------------------------
*Step, name=Step-1
*Static
1., 1., 1e-05, 1.
**
** Default: Fix one corner to prevent rigid body motion
*Boundary
Bottom_Z, 1, 3
**
*End Step
